// SBML level 2 version 4

model MODEL1403310001()
  // Fribourg2014 - Dynamics of viral antagonism and innate immune response (H1N1 influenza A virus - NC/99)
  // The dynamics of the interplay between the viral antagonism and the innate immune response has been studied using modelling approaches. The responses of human monocyte-derived dendritic cells infected by two influenza A H1N1 strains (the pandemic swine-origin A/California/4/2009 (Cal/09) and the seasonal A/New Caledonia/20/1999 (NC/99)) that have different clinical outcomes have been modelled. From the time course gene expression measurements of a set of selected genes, the dynamic features of viral antagonism and innate immune response are extracted. It is found that the strength and the time scale of action of viral antagonism is significantly different between the two viruses. This model describes the viral infection by seasonal NC/99.
  // This model is described in the article:
  // Model of influenza A virus infection: Dynamics of viral antagonism and innate immune response.
  // Fribourg M, Hartmann B, Schmolke M, Marjanovic N, Albrecht RA, García-Sastre A, Sealfon SC, Jayaprakash C, Hayot F.
  // J Theor Biol. 2014 Mar 2;351C:47-57.
  // Abstract:
  // Viral antagonism of host responses is an essential component of virus pathogenicity. The study of the interplay between immune response and viral antagonism is challenging due to the involvement of many processes acting at multiple time scales. Here we develop an ordinary differential equation model to investigate the early, experimentally measured, responses of human monocyte-derived dendritic cells to infection by two H1N1 influenza A viruses of different clinical outcomes: pandemic A/California/4/2009 and seasonal A/New Caledonia/20/1999. Our results reveal how the strength of virus antagonism, and the time scale over which it acts to thwart the innate immune response, differs significantly between the two viruses, as is made clear by their impact on the temporal behavior of a number of measured genes. The model thus sheds light on the mechanisms that underlie the variability of innate immune responses to different H1N1 viruses.
  // This model is hosted on BioModels Database and identified by: MODEL1403310001.
  // To cite BioModels Database, please use: BioModels Database: An enhanced, curated and annotated resource for published quantitative kinetic models.
  // To the extent possible under law, all copyright and related or neighbouring rights to this encoded model have been dedicated to the public domain worldwide. Please refer to CC0 Public Domain Dedication for more information.
  // biomodels.db:MODEL1403310001
  // biomodels.db:BIOMD0000000529
  // isDescribedBy pubmed:24594370
  // isDerivedFrom pubmed:20159146 pubmed:20739535
  // isVersionOf GO:0045087 GO:0009814
  // hasTaxon taxonomy:9606 taxonomy:381512

  // Compartments:
  compartment default = 1 volume;
  compartment Environment in default = 1 volume;  // isVersionOf BTO:0000316
  compartment compartment in default = 1 volume; compartment is "Cell";  // isVersionOf BTO:0002042

  // Species:
  species $w in compartment = 0;
  species IFNb_mRNA in compartment = 0;  // encodes interpro:IPR015588
  species IFNb_env in Environment = 0;  // isVersionOf interpro:IPR015588
  species STATP2n in compartment = 0;  // isVersionOf interpro:IPR001217
  species SOCS1m in compartment = 0;  // encodes interpro:IPR028411
  species IRF7m in compartment = 0;  // encodes uniprot:Q92985
  species IRF7Pn in compartment = 0;  // isVersionOf uniprot:Q92985
  species IFNa_mRNA in compartment = 0;  // isVersionOf interpro:IPR015589
  species IFNa_env in Environment = 0;  // isVersionOf interpro:IPR015589
  species TNFam in compartment = 0;  // isVersionOf uniprot:P01375
  species TNFenv in Environment = 0;  // isVersionOf uniprot:P01375
  species STATm in compartment = 0;  // encodes interpro:IPR001217
  species STAT in compartment = 0.1;  // isVersionOf interpro:IPR001217

  // Parameters:
  r5 = 1 dimensionless;
  n3 = 8 substance;
  bm = 4.5 substance;
  sp = 0.1 substance;
  delta1 = 0.1 substance;
  n1 = 5 substance;
  sv = 0.1 substance;
  delta2 = 0.4 substance;
  n2 = 5 substance;
  TJtot = 0.0001 substance;
  K3 = 0.0043 substance;
  K9 = 780 substance;
  delta = 0.0003 substance;
  r0 = 0.003 substance;
  k15 = 3.6e-5 substance;
  tao1 = 2.5 substance;
  C = 500000 substance;
  vmax2 = 72000 substance;
  NA = 6.023e23 substance;
  K2 = 72000 substance;
  K5 = 0.01 substance;
  tao3 = 0.56 substance;
  r3 = 1e-7 substance;
  k8 = 0.0036 substance;
  tao4 = 0.46 substance;
  k11 = 0.00036 substance;
  k14 = 3.204e-7 substance;
  tao6 = 1;
  k12 = 3600 substance;
  k16 = 3600 substance;
  tao8 = 2 substance;
  vmax17 = 72000 substance;
  K17 = 0.002 substance;
  r1 = 0.00025 substance;
  rmax20 = 0.001 substance;
  K20 = 0.0006 substance;
  tao9 = 2 substance;
  vmax19 = 154800 substance;
  K19 = 0.004 substance;
  r4 = 1e-6 substance;
  k26 = 0.360085 substance;
  tao12 = 1 substance;
  k28 = 360 substance;
  tao13 = 15 substance;

  // Assignment rules:
  NS := r5*time^n3/(bm^n3 + time^n3);
  IC1 := (1 + sp*(NS/delta1)^n1)/(1 + (NS/delta1)^n1);
  IC2 := (1 + sv*(NS/delta2)^n2)/(1 + (NS/delta2)^n2);
  IC2ifa := (1 + 3*sv*(NS/delta2)^n2)/(1 + (NS/delta2)^n2);
  TJ := TJtot*(IFNb_env + IFNa_env)/(K3 + IFNb_env + IFNa_env)*1/(1 + K9*SOCS1m/delta);

  // Reactions:
  J1: $w => IFNb_mRNA; (r0*IC1 + k15*IRF7Pn)*IC2 - IFNb_mRNA*ln(2)/tao1;  // modifiers: IRF7Pn
  J2: $w => IFNb_env; 1000000000*C*vmax2/NA*IFNb_mRNA/(K2 + IFNb_mRNA);  // modifiers: IFNb_mRNA
  J3: $w => STATP2n; K5*TJ*STAT/2/(K5 + STAT) - STATP2n*ln(2)/tao3;  // modifiers: STAT
  J4: $w => SOCS1m; (r3*IC1 + k8*STATP2n)*IC2 - SOCS1m*ln(2)/tao4;  // modifiers: STATP2n
  J5: $w => IRF7m; (k11*STATP2n + k14*IRF7Pn)*IC2 - IRF7m*ln(2)/tao6;  // modifiers: STATP2n, IRF7Pn
  J6: $w => IRF7Pn; k12*IC1*IRF7m;  // modifiers: IRF7m
  J7: $w => IFNa_mRNA; k16*IRF7Pn*IC2ifa - IFNa_mRNA*ln(2)/tao8;  // modifiers: IRF7Pn
  J8: $w => IFNa_env; 1000000000*C*vmax17/NA*IFNa_mRNA/(K17 + IFNa_mRNA);  // modifiers: IFNa_mRNA
  J9: $w => TNFam; (r1*IC1 + rmax20*TNFenv/(K20 + TNFenv))*IC2 - TNFam*ln(2)/tao9;  // modifiers: TNFenv
  J10: $w => TNFenv; 1000000000*C*vmax19/NA*TNFam/(K19 + TNFam);  // modifiers: TNFam
  J11: $w => STATm; (r4*IC1 + k26*STATP2n)*IC2 - STATm*ln(2)/tao12;  // modifiers: STATP2n
  J12: $w => STAT; k28*STATm - STAT*ln(2)/tao13;  // modifiers: STATm

  // Unit definitions:
  unit substance = 1e-6 mole;
  unit volume = litre;
  unit area = metre^2;
  unit length = metre;
  unit time = 3600 second;
end
